// SBML level 3 version 1
// Created with https://github.com/matthiaskoenig/sbmlutils.

function thresholding(x, y)
  piecewise(1, x > y, 0);
end

model meal_model(gut)
  // Meal model
  // # Meal model
  // Terms of use
  // The content of this model has been carefully created in a manual research effort. This file has been created by Matthias König using sbmlutils. For questions contact koenigmx@hu-berlin.de. Copyright © 2024 Matthias König.
  // This work is licensed under a Creative Commons Attribution 4.0 International License.
  // Redistribution and use of any part of this model, with or without modification, are permitted provided that the following conditions are met:
  // Redistributions of this SBML file must retain the above copyright notice, this list of conditions and the following disclaimer.
  // Redistributions in a different form must reproduce the above copyright notice, this list of conditions and the following disclaimer in the documentation and/or other materials provided with the distribution.
  // This model is distributed in the hope that it will be useful, but WITHOUT ANY WARRANTY; without even the implied warranty of MERCHANTABILITY or FITNESS FOR A PARTICULAR PURPOSE.
  // model units - substance: mmole, time: min, volume: litre, area: m2, length: metre, extent: mmole

  // Compartments:
  compartment plasma = 4 litre;  // SBO:0000290 ncit:C13356
  compartment gut = 4;  // SBO:0000290 CHEBI:6904 ncit:C61845 inchikey:IUBSYMUCCVWXPE-UHFFFAOYSA-N

  // Species:
  species g_gut in gut = 0;  // substance in mg; SBO:0000247 CHEBI:6904 ncit:C61845 inchikey:IUBSYMUCCVWXPE-UHFFFAOYSA-N
  species g_plasma in plasma = fasting_glucose; g_plasma is "Plasma glucose";  // SBO:0000247 CHEBI:6904 ncit:C61845 inchikey:IUBSYMUCCVWXPE-UHFFFAOYSA-N
  species g_integral in plasma = 0;  // substance in mmole_glucose_min; SBO:0000247 CHEBI:6904 ncit:C61845 inchikey:IUBSYMUCCVWXPE-UHFFFAOYSA-N
  species I_PL in plasma = fasting_insulin; I_PL is "Plasma insulin";  // substance in nano_iu_insulin; SBO:0000247 CHEBI:6904 ncit:C61845 inchikey:IUBSYMUCCVWXPE-UHFFFAOYSA-N
  species i_intestitial in gut = 0;  // substance in nano_iu_insulin; SBO:0000247 CHEBI:6904 ncit:C61845 inchikey:IUBSYMUCCVWXPE-UHFFFAOYSA-N
  species i_delay1 in plasma = fasting_insulin;  // substance in nano_iu_insulin; SBO:0000247 CHEBI:6904 ncit:C61845 inchikey:IUBSYMUCCVWXPE-UHFFFAOYSA-N
  species i_delay2 in plasma = fasting_insulin;  // substance in nano_iu_insulin; SBO:0000247 CHEBI:6904 ncit:C61845 inchikey:IUBSYMUCCVWXPE-UHFFFAOYSA-N
  species i_delay3 in plasma = fasting_insulin;  // substance in nano_iu_insulin; SBO:0000247 CHEBI:6904 ncit:C61845 inchikey:IUBSYMUCCVWXPE-UHFFFAOYSA-N
  species nefa_plasma in plasma = fasting_NEFA; nefa_plasma is "Plasma NEFA";  // SBO:0000247 CHEBI:6904 ncit:C61845 inchikey:IUBSYMUCCVWXPE-UHFFFAOYSA-N
  species tg_gut in gut = 0;  // substance in mg; SBO:0000247 CHEBI:6904 ncit:C61845 inchikey:IUBSYMUCCVWXPE-UHFFFAOYSA-N
  species tg_delay1 in gut = 0;  // SBO:0000247 CHEBI:6904 ncit:C61845 inchikey:IUBSYMUCCVWXPE-UHFFFAOYSA-N
  species tg_delay2 in gut = 0;  // SBO:0000247 CHEBI:6904 ncit:C61845 inchikey:IUBSYMUCCVWXPE-UHFFFAOYSA-N
  species tg_plasma in plasma = fasting_TG; tg_plasma is "plasma TG";  // SBO:0000247 CHEBI:6904 ncit:C61845 inchikey:IUBSYMUCCVWXPE-UHFFFAOYSA-N

  // Parameters:
  fG = 0.005551 mg_per_l; fG is "f_G";  // SBO:0000002
  fTG = 0.00113 mmole_per_ml; fTG is "f_TG";  // SBO:0000002
  fI = 1 to_mmole_per_l; fI is "f_I";  // SBO:0000002
  tau_i = 31 min;  // SBO:0000002
  tau_d = 3 min;  // SBO:0000002
  G_threshold_pl = 9 dimensionless; G_threshold_pl is "G_th_PL";  // SBO:0000002
  c1 = 0.1 dimensionless;  // SBO:0000002
  k1 = 0.0105 per_min; k1 is "K1";  // SBO:0000002
  k2 = 0.28 per_min; k2 is "K2";  // SBO:0000002
  k3 = 0.00607 per_min; k3 is "K3";  // SBO:0000002
  k4 = 0.000235 micro_mole_glucose_rate; k4 is "K4";  // SBO:0000002
  k5 = 0.0424 micro_mole_glucose_rate; k5 is "K5";  // SBO:0000002
  k6 = 2.2975 micro_iu_insulin_rate; k6 is "K6";  // SBO:0000002
  k7 = 1.15 micro_iu_insulin_rate; k7 is "K7";  // SBO:0000002
  k8 = 7.27 micro_iu_insulin_rate; k8 is "K8";  // SBO:0000002
  k9 = 0.0383 per_min; k9 is "K9";  // SBO:0000002
  k10 = 0.284 per_min; k10 is "K10";  // SBO:0000002
  sigma = 1.4 dimensionless;  // SBO:0000002
  gamma_sigma = 0.8872638 dimensionless;  // SBO:0000002
  Km = 13.2 mmole_glucose_per_l; Km is "KM";  // SBO:0000002
  G_b = fasting_glucose; G_b has mmole_glucose_per_l;  // SBO:0000002
  I_pl_b = fasting_insulin; I_pl_b has mmole_glucose_per_l; I_pl_b is "I_PL_b";  // SBO:0000002
  G_liv_b = 0.043 mmole_glucose_per_l_min; G_liv_b is "I_pl_b";  // SBO:0000002
  spill = 30 dimensionless;  // SBO:0000002
  k11 = 0.00045 lipolysis_coefficien_unit; k11 is "K11";  // SBO:0000002
  ATL_max = 0.215 mmole_nefa_per_l_min;  // SBO:0000002
  K_ATL = 0.0385 ml_sqr_per_micro_iu_sqr;  // SBO:0000002
  k12 = 0.0713 per_min;  // SBO:0000002
  tau_LPL = 208.88 min;  // SBO:0000002
  k13 = 0.0088 per_min;  // SBO:0000002
  k14 = 0.0163 per_min;  // SBO:0000002
  k15 = 1e-5 micromol_tg_per_min_microiu;  // SBO:0000002
  k16 = 0.0119 mmole_tg_per_l_min;  // SBO:0000002
  fasting_glucose = 5 mmole;  // SBO:0000002
  fasting_insulin = 18 micro_iu_insulin_per_ml;  // SBO:0000002
  fasting_TG = 1.3 mmole;  // SBO:0000002
  fasting_NEFA = 0.33 mmole;  // SBO:0000002
  mG = 75000 mg; mG is "meals_glucose_mass";  // SBO:0000002
  mTG = 60000 mg; mTG is "meals_tg_mass";  // SBO:0000002
  BW = 84.2 kilogram; BW is "subject_body_mass";  // SBO:0000002
  VG has volume_distribution;
  VTG has volume_distribution;
  G_meal has dimensionless; G_meal is "glucose_from_meal";
  intestinal_absorption has dimensionless;
  distribution_volume_correction has dimensionless;
  unit_conversion_glucose_insulin has dimensionless;
  egp_inhibition_by_insulin has dimensionless;
  egp_inhibition_by_glucose has dimensionless;
  G_liver has dimensionless;
  glucose_appearance has dimensionless;
  G_gut has dimensionless;
  normalized_utilization_rate has dimensionless;
  G_iid has dimensionless; G_iid is "Insulin-independent glucose utilization";
  utilization_rate has dimensionless;
  G_idp has dimensionless;
  G_ren has dimensionless;
  I_proportional has dimensionless;
  I_integral has dimensionless;
  I_pnc has dimensionless;
  basal_rate has dimensionless;
  I_liv has dimensionless;
  I_int has dimensionless;
  degradation has dimensionless; degradation is "Insulin degradation";
  LPL_lipolysis has dimensionless;
  fractional_spillover has dimensionless;
  spillover has dimensionless;
  adipose_tg_lipolysis has dimensionless;
  tissue_uptake has mmole_nefa_per_l_min;
  distribution_volume_correction_tg has dimensionless;
  VLDL has dimensionless; VLDL is "endogenous secretion of TG";
  TG_gut has dimensionless; TG_gut is "TG from the gut";
  glucose_plasma_flux has mmole_per_l_min; glucose_plasma_flux is "glucose flux from the gut";
  hepatic_glucose_flux has mmole_per_l_min;
  glucose_uptake_ii has mmole_per_l_min; glucose_uptake_ii is "glucose uptake into tissue insulin independent";
  glucose_uptake_id has mmole_per_l_min; glucose_uptake_id is "glucose uptake into tissue insulin dependent";
  glucose_uptake has mmole_per_l_min;
  tg_plasma_flux has mmole_per_l_min; tg_plasma_flux is "TG flux from the gut";
  hepatic_tg_flux has mmole_per_l_min; hepatic_tg_flux is "hepatic TG flux (VLDL)";

  // Assignment rules:
  VG := 260/sqrt(BW/70)/1000;
  VTG := 70/sqrt(BW/70)/1000;
  G_meal := k1^sigma*time^(sigma - 1)*exp(-1*k1*time)*mG*(1/gamma_sigma);
  intestinal_absorption := k2*g_gut;
  distribution_volume_correction := 1/(VG*BW);
  unit_conversion_glucose_insulin := 1/fI;
  egp_inhibition_by_insulin := k4*i_intestitial*unit_conversion_glucose_insulin;
  egp_inhibition_by_glucose := k3*(g_plasma - G_b);
  G_liver := G_liv_b - egp_inhibition_by_insulin - egp_inhibition_by_glucose;
  glucose_appearance := k2*g_gut;
  G_gut := glucose_appearance*distribution_volume_correction*fG;
  normalized_utilization_rate := (Km + G_b)*g_plasma/(G_b*(Km + g_plasma));
  G_iid := normalized_utilization_rate*G_liv_b;
  utilization_rate := k5*g_plasma/(Km + g_plasma);
  G_idp := utilization_rate*i_intestitial;
  G_ren := c1*distribution_volume_correction*(g_plasma - G_threshold_pl)*thresholding(g_plasma, G_threshold_pl);
  I_proportional := k6*(g_plasma - G_b);
  I_integral := k7/tau_i*(g_integral + G_b);
  I_pnc := (I_proportional + I_integral)/fI;
  basal_rate := k7/tau_i*G_b/fI;
  I_liv := basal_rate*(I_PL/I_pl_b);
  I_int := k9*(I_PL - I_pl_b);
  degradation := k10*i_intestitial;
  LPL_lipolysis := k11*tg_plasma*i_delay3;
  fractional_spillover := 1/100*spill*(I_pl_b/i_delay1);
  spillover := 3*fractional_spillover*LPL_lipolysis;
  adipose_tg_lipolysis := ATL_max/(1 + K_ATL*i_delay1^2);
  tissue_uptake := k12*nefa_plasma;
  distribution_volume_correction_tg := 1/(VTG*BW);
  VLDL := k16 - k15*(i_delay3 - I_pl_b);
  TG_gut := k14*distribution_volume_correction_tg*fTG*tg_delay2;
  glucose_plasma_flux := k2*fG/(BW*VG)*g_gut;
  hepatic_glucose_flux := G_liv_b - k4*fI*i_intestitial - k3*(g_plasma - G_b);
  glucose_uptake_ii := G_liv_b*(Km + G_b)*g_plasma/(G_b*(Km + g_plasma));
  glucose_uptake_id := i_intestitial*g_plasma*(k5/(Km + g_plasma));
  glucose_uptake := glucose_uptake_ii + glucose_uptake_id;
  tg_plasma_flux := k14*fTG/(BW*VTG)*tg_delay2;
  hepatic_tg_flux := k16 - k15*(i_delay3 - I_pl_b);

  // Rate rules:
  g_gut' = G_meal - intestinal_absorption;
  g_plasma' = G_liver + G_gut - G_iid - G_idp - G_ren;
  g_integral' = g_plasma - G_b;
  I_PL' = I_pnc - I_liv - I_int;
  i_intestitial' = I_int - degradation;
  i_delay1' = 3/tau_LPL*(I_PL - i_delay1);
  i_delay2' = 3/tau_LPL*(i_delay1 - i_delay2);
  i_delay3' = 3/tau_LPL*(i_delay2 - i_delay3);
  nefa_plasma' = spillover + adipose_tg_lipolysis - tissue_uptake;
  tg_gut' = k13^sigma*time^(sigma - 1)*exp(-1*k13*time)*mTG*(1/gamma_sigma) - k14*tg_gut;
  tg_delay1' = k14*(tg_gut - tg_delay1);
  tg_delay2' = k14*(tg_delay1 - tg_delay2);
  tg_plasma' = VLDL + TG_gut - LPL_lipolysis;

  // Unit definitions:
  unit g_per_mole = gram / mole; g_per_mole is "g/mole";
  unit litre_per_min = litre / (60 second); litre_per_min is "litre/min";
  unit lipolysis_coefficien_unit = 1e-3 litre / (3.490546e-8 gram * 60 second); lipolysis_coefficien_unit is "213.32*μg*1000*ml/(34.7*μg*176.12*μg*1000*min)";
  unit m2 = metre^2; m2 is "meter^2";
  unit mM = 1e-3 mole / litre; mM is "mmole/liter";
  unit mg = 1e-3 gram;
  unit mg_per_l = 1e-3 gram / litre; mg_per_l is "mg/litre";
  unit micro_iu_insulin = 3.47e-5 gram; micro_iu_insulin is "34.7*μg";
  unit micro_iu_insulin_per_ml = 3.47e-5 gram / (1e-3 litre); micro_iu_insulin_per_ml is "34.7*μg/ml";
  unit micro_iu_insulin_rate = 1 / (11.56667 second); micro_iu_insulin_rate is "34.7*μg/(180*μg*min)";
  unit micro_mole_glucose = 1.8e-4 gram; micro_mole_glucose is "180*μg";
  unit micro_mole_glucose_per_ml = 1.8e-4 gram / (1e-3 litre); micro_mole_glucose_per_ml is "180*μg/ml";
  unit micro_mole_glucose_rate = 1 / (311.2392 second); micro_mole_glucose_rate is "180*μg/(34.7*μg*min)";
  unit micromol_tg_per_min_microiu = 1 / (304.5303 second); micromol_tg_per_min_microiu is "176.12*μg/(min*34.7*μg)";
  unit min = 60 second;
  unit ml_sqr_per_micro_iu_sqr = (5.368281e-3 litre)^2 * (1e-3 gram)^2; ml_sqr_per_micro_iu_sqr is "ml^2/34.7*μg^2";
  unit mmole = 1e-3 mole;
  unit mmole_glucose = 0.18 gram; mmole_glucose is "180*μg*1000";
  unit mmole_glucose_min = 0.18 gram * 60 second; mmole_glucose_min is "180*μg*1000*min";
  unit mmole_glucose_per_l = 0.18 gram / litre; mmole_glucose_per_l is "180*μg*1000/liter";
  unit mmole_glucose_per_l_min = 0.18 gram * 60 second / litre; mmole_glucose_per_l_min is "(180*μg*1000*min)/liter";
  unit mmole_nefa = 0.21332 gram; mmole_nefa is "213.32*μg*1000";
  unit mmole_nefa_per_l = 0.21332 gram / (litre * 60 second); mmole_nefa_per_l is "213.32*μg*1000/(liter*min)";
  unit mmole_nefa_per_l_min = 0.21332 gram / (litre * 60 second); mmole_nefa_per_l_min is "213.32*μg*1000/(liter*min)";
  unit mmole_per_l_min = 1e-3 mole / (litre * 60 second); mmole_per_l_min is "mmole/liter/min";
  unit mmole_per_min = 1e-3 mole / (60 second); mmole_per_min is "mmole/min";
  unit mmole_per_ml = 1e-3 mole / (1e-3 litre); mmole_per_ml is "mmole/ml";
  unit mmole_tg = 0.17612 gram; mmole_tg is "176.12*μg*1000";
  unit mmole_tg_per_l = 0.17612 gram / litre; mmole_tg_per_l is "176.12*μg*1000/(liter)";
  unit mmole_tg_per_l_min = 0.17612 gram / (litre * 60 second); mmole_tg_per_l_min is "176.12*μg*1000/(liter*min)";
  unit nano_iu_insulin = 3.47e-8 gram; nano_iu_insulin is "34.7*μg/1000";
  unit per_min = 1 / (60 second); per_min is "1/min";
  unit to_mmole_per_l = 1e-3 mole * 60 second / (1e-3 litre * litre); to_mmole_per_l is "(34.7*μg/ml)*((mmole*min)/(34.7*μg*liter))";
  unit volume_distribution = 1 / (31.62278 gram)^2; volume_distribution is "1/kilogram^2";
end
